# Решение дифференциального уравнения методом Рунге-Кутта
h := 0.1
y[0] := 1
i := 0, 1 .. 10
x[i] := i*h
zz(x, y) := 2*(x^2 + y)
f := 2*(x^2 + y[0])
kk1 := zz(x[0], y[0]) = 2
k1 := 2*(x[0]^2 + y[0]) = 2
kk2 := zz(x[0] + h/2, y[0] + h*kk1/2) = 2.205
k2 := 2*((x[0] + h/2)^2 + (y[0] + h*k1/2)) = 2.205
kk3 := zz(x[0] + h/2, y[0] + h*kk2/2) = 2.2255
k3 := 2*((x[0] + h/2)^2 + (y[0] + h*k2/2)) = 2.2255
kk4 := zz(x[0] + h, y[0] + h*kk3) = 2.4651
k4 := 2*((x[0] + h)^2 + (y[0] + h*k3)) = 2.4651
deltY := y[0] + h/6*(k1 + 2*k2 + 2*k3 + k4) = 1.2221
y1 := y[0] + h/6*(k1 + 2*k2 + 2*k3 + k4) = 1.2221
